// COMSOL Multiphysics 6.1.0.282 model "CM1_AortatoChest.mph"
// Outline of the model tree

Parameters
  ep_skin_dry = 5.01+ 31.4/(1+(i*freq/19.9[GHz])^(1-0.066)) + 830/(1+(i*freq/6.77[MHz])^(1-0.139)) - i*(0.005[S/m])/2*pi*freq*e_0  // Complex permittivity of skin (dry)
  ep_skin_wet = 2.64+ 45.7/(1+(i*freq/17.6[GHz])^(1-0.177)) + 3660/(1+(i*freq/1.47[MHz])^(1-0.097)) - i*(0.13[S/m])/2*pi*freq*e_0  // Complex permittivity of skin (wet)
  ep_muscle = 3.91+ 55/(1+(i*freq/18[GHz])^(1-0.165)) + 663/(1+(i*freq/0.78[MHz])^(1-0.387)) - i*(0.633[S/m])/2*pi*freq*e_0  // Complex permittivity of muscle
  ep_lung_inflated = 4.44+ 14.6/(1+(i*freq/16.1[GHz])^(1-0.001)) + 646/(1+(i*freq/3.22[MHz])^(1-0.181)) - i*(0.0842[S/m])/2*pi*freq*e_0  // Complex permittivity of the inflated lung
  ep_kidney = 4.43 + 43.3/(1+(i*freq/20.2[GHz])^(1-0.052)) + 2050/(1+(i*freq/2.87[MHz])^(1-0.212)) - i*(0.267[S/m])/2*pi*freq*e_0  // Complex permittivity of the kidney
  ep_heart = 3.84 + 49.1/(1+(i*freq/18.7[GHz])^(1-0.049)) + 2520/(1+(i*freq/1.73[MHz])^(1-0.196)) - i*(0.31[S/m])/2*pi*freq*e_0  // Complex permittivity of heart
  ep_bone_cort = 3.22 + 10/(1+(i*freq/9.49[GHz])^(1-0.218)) + 693/(1+(i*freq/0.414[MHz])^(1-0.217)) - i*(0.018[S/m])/2*pi*freq*e_0  // Complex permittivity of cortical bone
  ep_bone_can = 4.21 + 12.1/(1+(i*freq/15.6[GHz])^(1-0.003)) + 917/(1+(i*freq/0.471[MHz])^(1-0.33)) - i*(0.0231[S/m])/2*pi*freq*e_0  // Complex permittivity of cancellous bone
  ep_fat = 2.32 + 2.14/(1+(i*freq/20.1[GHz])^(1-0.002)) + 19.7/(1+(i*freq/8.25[MHz])^(1-0.259)) - i*(0.0222[S/m])/2*pi*freq*e_0  // Complex permittivity of fat
  ep_aorta = 2.27 + 28.2/(1+(i*freq/15.2[GHz])^(1-0.001)) + 1360/(1+(i*freq/0.0225[MHz])^(1-0.59)) - i*(0.292[S/m])/2*pi*freq*e_0  // Complex permittivity of aorta
  e_0 = 8.85E-12 [F/m]  // Permittivity of a vacuum
  t_lung = 2*4.1[mm]  // Average thickness of the upper section of left lung
  t_rib = 6 [mm]  // Average thickness of a human rib
  t_pect = 4[mm]  // Average thickness of the pectorialis muscle
  t_fat = 11.1[mm]/2  // Average thickness of the fat at the chest
  t_skin = 6052.5 [um]  // Average thickness of the skin at the chest (male)
  L_chest = 11 [cm]  // Length of chest area
  W_chest = 5*W_rib  // Width of chest area
  L_electrode = 5[mm]  // Length of electrode
  W_electrode = 20 [mm]  // Width of electrode
  t_electrode = L_electrode/4  // Thickness of electrode
  t_model = t_lung+t_rib+t_pect+t_fat+t_skin  // Thickness of entire model
  er_lung_inflated = real(ep_lung_inflated)  // Relative permittivity of lung tissue (inflated)
  cond_lung_inflated = e_0*imag(ep_lung_inflated)*2*pi*freq [S/m]  // Conductivity of lung tissue (inflated)
  er_bone_can = real(ep_bone_can)  // Relative permittivity of cancellous bone
  cond_bone_can = e_0*imag(ep_bone_can)*2*pi*freq [S/m]  // Conductivity of cancellous bone
  er_muscle = real(ep_muscle)  // Relative permittivity of muscle
  cond_muscle = e_0*imag(ep_muscle)*2*pi*freq [S/m]  // Conductivity of muscle
  er_fat = real(ep_fat)  // Relative permittivity of fat
  cond_fat = e_0*imag(ep_fat)*2*pi*freq [S/m]  // Conductivity of fat
  er_skin_wet = real(ep_skin_wet)  // Relative permittivity of wet skin
  cond_skin_wet = e_0*imag(ep_skin_wet)*2*pi*freq [S/m]  // Conductivity of wet skin
  er_skin_dry = real(ep_skin_dry)  // Relative permittivity of dry skin
  cond_skin_dry = e_0*imag(ep_skin_dry)*2*pi*freq [S/m]  // Conductivity of dry skin
  z_electrode = 2 [mm]  // Spacing between electrodes
  W_rib = 11.3 [mm]  // Vertical height of the rib.
  t_rib_cancellous = 0.9 [mm]  // Thickness of the Cancellous Bone part of the human ribs
  er_bone_cort = real(ep_bone_cort)  // Relative permittivity of cortical bone
  cond_bone_cort = e_0*imag(ep_bone_cort)*2*pi*freq [S/m]  // Conductivity of cortical bone
  t_aorta = 26.6 [mm]  // Average diameter of the human aorta (normal weight)
  t_aortawall = 4 [mm]  // Aorta wall thickness (healthy)
  ep_blood = 11.8 + 41.4/(1+(i*freq/15.8[GHz])^(1-0.015)) + 7930/(1+(i*freq/0.947[MHz])^(1-0.092)) - i*(0.996[S/m])/2*pi*freq*e_0  // Complex permittivity of blood
  er_blood = real(ep_blood)  // Relative permittivity of blood
  cond_blood = e_0*imag(ep_blood)*2*pi*freq [S/m]  // Conductivity of the human blood
  cond_aorta = e_0*imag(ep_aorta)*2*pi*freq [S/m]  // Conductivity of the aorta
  er_aorta = real(ep_aorta)  // Relative permittivity of the aorta
  ang_electrode = (W_electrode/t_aorta)*(180/pi)  // Sector angle used to build the implanted electrode
  W_chest_electrode = 2 [cm]  // Length of side of chest electrodes
  z_chest_space = 2 [mm]  // Spacing between chest electrodes

Geometry
  geom1 "Geometry 1" (3D, length unit m)
    cyl1: Cylinder "Aorta" | r = t_aorta/2; h = W_chest
    cyl2: Cylinder "Inner Aorta" | r = (t_aorta-t_aortawall)/2; h = W_chest
    dif1: Difference | input = cyl1; input2 = cyl2; keepsubtract = on
    wp4: WorkPlane "Aorta Signal Electrode" | quickz = W_chest/2 + z_electrode/2; unite = on
      ca1: CircularArc
        r = t_aorta/2
        point1 = {-0.0048830538289, -0.0123711674996}
        point2 = {0.0048830538289, -0.0123711674996}
        angle1 = -90 - ang_electrode/2
        angle2 = -90 + ang_electrode/2
    ext4: Extrude | workplane = wp4; input = wp4; distance = W_electrode/2
    wp5: WorkPlane "Aorta Ground Electrode" | quickz = W_chest/2 - z_electrode/2; unite = on
      ca1: CircularArc
        r = t_aorta/2
        point1 = {-0.0048830538289, -0.0123711674996}
        point2 = {0.0048830538289, -0.0123711674996}
        angle1 = -90 - ang_electrode/2
        angle2 = -90 + ang_electrode/2
    ext5: Extrude | workplane = wp5; input = wp5; distance = -W_electrode/2
    blk1: Block "Blood" | pos = {0, 0, W_chest/2}; base = center; size = {L_chest, t_aorta, W_chest}
    wp1: WorkPlane "Chest Model" | quickplane = yz; quickx = L_chest/2; quicky = -t_aorta/2; unite = on
      r1: Rectangle "Lung" | pos = {-(t_aorta/2 + t_lung/2), W_chest/2}; base = center; size = {t_lung, W_chest}
      r5: Rectangle "Rib1"
        pos = {-( t_aorta/2 + t_lung + t_rib/2), 4*W_chest/5 + W_chest/10}
        base = center
        size = {t_rib, W_rib}
      r2: Rectangle "Rib2"
        pos = {-( t_aorta/2 + t_lung + t_rib/2), 2*W_chest/5 + W_chest/10}
        base = center
        size = {t_rib, W_rib}
      r6: Rectangle "Rib3"
        pos = {-( t_aorta/2 + t_lung + t_rib/2), 0*W_chest/5 + W_chest/10}
        base = center
        size = {t_rib, W_rib}
      r3: Rectangle "Intercoastal1"
        pos = {-( t_aorta/2 + t_lung + t_rib/2), 3*W_chest/5 + W_chest/10}
        base = center
        size = {t_rib, W_chest/5}
      r4: Rectangle "Intercoastal2"
        pos = {-( t_aorta/2 + t_lung + t_rib/2), 1*W_chest/5 + W_chest/10}
        base = center
        size = {t_rib, W_chest/5}
      r7: Rectangle "Pectoralis Major"
        pos = {-( t_aorta/2 + t_lung + t_rib + t_pect/2), W_chest/2}
        base = center
        size = {t_pect, W_chest}
      r8: Rectangle "Fat"
        pos = {-( t_aorta/2 + t_lung + t_rib + t_pect + t_fat/2), W_chest/2}
        base = center
        size = {t_fat, W_chest}
      r9: Rectangle "Skin"
        pos = {-( t_aorta/2 + t_lung + t_rib + t_pect + t_fat + t_skin/2), W_chest/2}
        base = center
        size = {t_skin, W_chest}
      r10: Rectangle "Rib1_Cancellous"
        pos = {-( t_aorta/2 + t_lung + t_rib/2), 4*W_chest/5 + W_chest/10}
        base = center
        size = {t_rib - t_rib_cancellous, W_rib - t_rib_cancellous}
      r11: Rectangle "Rib2_Cancellous"
        pos = {-( t_aorta/2 + t_lung + t_rib/2), 2*W_chest/5 + W_chest/10}
        base = center
        size = {t_rib - t_rib_cancellous, W_rib- t_rib_cancellous}
      r12: Rectangle "Rib3_Cancellous"
        pos = {-( t_aorta/2 + t_lung + t_rib/2), 0*W_chest/5 + W_chest/10}
        base = center
        size = {t_rib - t_rib_cancellous, W_rib - t_rib_cancellous}
    ext1: Extrude | workplane = wp1; input = wp1; distance = -L_chest
    wp3: WorkPlane "Chest Electrodes"
      quickplane = zx
      quickx = t_model - t_lung/2
      quicky = -(t_aorta/2 + t_lung + t_rib + t_pect + t_fat+t_skin)
      unite = on
      r1: Rectangle "Signal Electrode"
        pos = {W_chest/2 + (z_chest_space/2 + W_chest_electrode/2), 0}
        base = center
        size = {W_chest_electrode, W_chest_electrode}
      r2: Rectangle "Ground Electrodes"
        pos = {W_chest/2 - (z_chest_space/2 + W_chest_electrode/2), 0}
        base = center
        size = {W_chest_electrode, W_chest_electrode}
    ext2: Extrude (disabled) | workplane = none; input = wp2; distance = t_electrode; reverse = on
    ext3: Extrude (disabled) | workplane = wp3; input = wp3; distance = t_electrode
    fin: Finalize "Form Union"

Materials
  mat1: Common "Lung Tissue" on domains 12
    def "Basic"
      electricconductivity = cond_lung_inflated
      relpermittivity = er_lung_inflated
  mat2: Common "Cancellous Rib" on domains 4, 6, 8
    def "Basic"
      electricconductivity = cond_bone_can
      relpermittivity = er_bone_can
  mat3: Common "Muscle" on domains 3, 5, 7
    def "Basic"
      electricconductivity = cond_muscle
      relpermittivity = er_muscle
  mat4: Common "Fat" on domains 2
    def "Basic"
      electricconductivity = cond_fat
      relpermittivity = er_fat
  mat5: Common "Skin" on domains 1
    def "Basic"
      electricconductivity = cond_skin_wet
      relpermittivity = er_skin_wet
  mat7: Common "Cortial Rib" on domains 9-11
    def "Basic"
      electricconductivity = cond_bone_cort
      relpermittivity = er_bone_cort
  mat8: Common "Aorta Walls" on domains 14
    def "Basic"
      electricconductivity = cond_aorta
      relpermittivity = er_aorta
  mat9: Common "Blood" on domains 13, 15, 16
    def "Basic"
      electricconductivity = cond_blood
      relpermittivity = er_blood

Physics
  ec: ConductiveMedia "Electric Currents" on all domains
    dependent variable V
    cucn1: CurrentConservation (default)
    ein1: ElectricInsulation (default)
    init1: init "Initial Values 1" (default)
    bcs1: BoundaryCurrentSource (disabled) on no boundaries | Qjs = 1
    gnd1: Ground on boundaries 67
    term1: Terminal on boundaries 68 | I0 = 0.0008
    term2: Terminal on boundaries 66 | TerminalType = Circuit
    term3: Terminal on boundaries 65 | TerminalType = Circuit
  cir: Circuit "Electrical Circuit"
    dependent variable voltages
    gnd1: GroundNode
    R1: Resistor | Connections = {2, 3}
    IvsU1: ModelDeviceIV "External I vs. U 1" | V_src = root.comp1.ec.V0_2; Connections = {2, 0}
    IvsU2: ModelDeviceIV "External I vs. U 2" | V_src = root.comp1.ec.V0_3; Connections = {3, 0}

Mesh
  mesh1 "Mesh 1" (physics-controlled)
    size: MeshSizeDefault | hauto = 6

Studies
  std1 "Study 1"
    param: Parametric "Parametric Sweep" (disabled)
      pname = W_chest_electrode
      plistarr = range(1 [cm],0.5 [cm],2.5[cm])
      punit = m
    freq: Frequency "Frequency Domain" | plist = range(1 [MHz],0.5 [MHz],80 [MHz])

Solver configurations
  sol1 "Solution 1" (study std1)
    v1: Variables "Dependent Variables 1"
    s1: Stationary "Stationary Solver 1" | linpmethod = sol
      p1: Parametric | pname = freq; plistarr = range(1 [MHz],0.5 [MHz],80 [MHz]); punit = Hz; pcontinuationmode = no
      fc1: FullyCoupled | linsolver = i1
      i1: Iterative | linsolver = bicgstab; nlinnormuse = on
        mg1: Multigrid
        dp1: DirectPreconditioner | linsolver = pardiso

Tables
  tbl1: Table
    // Voltage Gain
    freq (Hz) | Voltage Gain (Abs) (1) | Voltage Gain/ dB
    1.8375e+07 | 0.00556451 | -103.827
    1.89583e+07 | 0.00564071 | -103.555
    1.95417e+07 | 0.00571528 | -103.292
    2.0125e+07 | 0.0057883 | -103.038
    2.07083e+07 | 0.00585984 | -102.793
    2.12917e+07 | 0.00592998 | -102.555
    2.1875e+07 | 0.00599877 | -102.324
    2.24583e+07 | 0.00606627 | -102.1
    2.30417e+07 | 0.00613254 | -101.883
    2.3625e+07 | 0.00619763 | -101.672
  tbl2: Table
    // Output Voltage
    freq (Hz) | Output Volatge (V)
    1.8375e+07 | -0.000855952-1.87315e-06i
    1.89583e+07 | -0.000858154-5.43276e-06i
    1.95417e+07 | -0.000860208-9.02197e-06i
    2.0125e+07 | -0.00086212-1.26353e-05i
    2.07083e+07 | -0.000863899-1.6268e-05i
    2.12917e+07 | -0.000865552-1.99158e-05i
    2.1875e+07 | -0.000867084-2.3575e-05i
    2.24583e+07 | -0.000868503-2.72424e-05i
    2.30417e+07 | -0.000869812-3.09152e-05i
    2.3625e+07 | -0.000871018-3.45907e-05i
  tbl3: Table
    // Power Gain
    freq (Hz) | Power Gain (Ω) | Power Gain/ dB
    1.8375e+07 | 5.9537e-06 | -120.315
    1.89583e+07 | 6.05087e-06 | -120.153
    1.95417e+07 | 6.14575e-06 | -119.997
    2.0125e+07 | 6.23843e-06 | -119.848
    2.07083e+07 | 6.32901e-06 | -119.704
    2.12917e+07 | 6.41758e-06 | -119.565
    2.1875e+07 | 6.5042e-06 | -119.431
    2.24583e+07 | 6.58895e-06 | -119.301
    2.30417e+07 | 6.67191e-06 | -119.176
    2.3625e+07 | 6.75312e-06 | -119.055
  tbl6: Table
    // Channel Response
    freq (Hz) | Channel Response (1)
    1e+06 | 0.00114747-0.000138575i
    1.5e+06 | 0.00128681-0.000411064i
    2e+06 | 0.00140168-0.00061985i
    2.5e+06 | 0.00150957-0.0007895i
    3e+06 | 0.00161428-0.000932156i
    3.5e+06 | 0.00171636-0.00105449i
    4e+06 | 0.00181572-0.00116094i
    4.5e+06 | 0.00191214-0.00125457i
    5e+06 | 0.0020055-0.00133765i
    5.5e+06 | 0.00209577-0.0014119i
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  mrkvl1: Table "Intersections"
    // Graph marker
    freq (MHz) | Voltage Gain/ dB
    18.375 | -47.2878
    23.625 | -46.4091
  mrkvl2: Table "Intersections 1"
    // Graph marker
    freq (MHz) | Power Gain/ dB
    23.625 | -54.2593
  mrkvl3: Table "Intersections 2"
    // Graph marker
    freq (MHz) | Power Gain/ dB
    18.375 | -54.7543
    23.625 | -54.2593
  mrkvl4: Table "Intersections 3"
    // Graph marker
    freq (MHz) | Transimpedance (Ω)
    18.375 | 0.774397
    23.625 | 0.784375
  mrkvl5: Table "Intersections 4"
    // Graph marker
    freq (MHz) | Phase (1)
    18.375 | -33.8301
    23.625 | -32.389
  mrkvl6: Table "Intersections 5"
    // Graph marker
    freq (MHz) | Phase/ deg
    18.375 | -33.8301
    23.625 | -32.389
  mrkvl7: Table "Intersections 6"
    // Graph marker
    freq (MHz) | Voltage Gain/ dB
    18.375 | -47.2878
    23.625 | -46.4091