// COMSOL Multiphysics 6.1.0.282 model "CM2_AortatoHeart.mph"
// Outline of the model tree

Parameters
  cond_aorta = abs(e_0*imag(ep_aorta)*2*pi*freq) [S/m]  // Conductivity of the aorta
  cond_blood = abs(e_0*imag(ep_blood)*2*pi*freq) [S/m]  // Conductivity of the human blood
  cond_bone_can = abs(e_0*imag(ep_bone_can)*2*pi*freq) [S/m]  // Conductivity of cancellous bone
  cond_bone_cort = abs(e_0*imag(ep_bone_cort)*2*pi*freq) [S/m]  // Conductivity of cortical bone
  cond_fat = abs(e_0*imag(ep_fat)*2*pi*freq) [S/m]  // Conductivity of fat
  cond_heart = abs(e_0*imag(ep_heart)*2*pi*freq) [S/m]  // Conductivity of the heart
  cond_kidney = abs(e_0*imag(ep_kidney)*2*pi*freq) [S/m]  // Conductivity of the kidney
  cond_lung_inflated = abs(e_0*imag(ep_lung_inflated)*2*pi*freq) [S/m]  // Conductivity of lung tissue (inflated)
  cond_muscle = abs(e_0*imag(ep_muscle)*2*pi*freq) [S/m]  // Conductivity of muscle
  cond_skin_dry = abs(e_0*imag(ep_skin_dry)*2*pi*freq) [S/m]  // Conductivity of dry skin
  cond_skin_wet = abs(e_0*imag(ep_skin_wet)*2*pi*freq) [S/m]  // Conductivity of wet skin
  e_0 = 8.85E-12 [F/m]  // Permittivity of a vacuum
  ep_aorta = 2.27 + 28.2/(1+(i*freq/15.2[GHz])^(1-0.001)) + 1360/(1+(i*freq/0.0225[MHz])^(1-0.59)) - i*(0.292[S/m])/2*pi*freq*e_0  // Complex permittivity of aorta
  ep_blood = 11.8 + 41.4/(1+(i*freq/15.8[GHz])^(1-0.015)) + 7930/(1+(i*freq/0.947[MHz])^(1-0.092)) - i*(0.996[S/m])/2*pi*freq*e_0  // Complex permittivity of blood
  ep_bone_can = 4.21 + 12.1/(1+(i*freq/15.6[GHz])^(1-0.003)) + 917/(1+(i*freq/0.471[MHz])^(1-0.33)) - i*(0.0231[S/m])/2*pi*freq*e_0  // Complex permittivity of cancellous bone
  ep_bone_cort = 3.22 + 10/(1+(i*freq/9.49[GHz])^(1-0.218)) + 693/(1+(i*freq/0.414[MHz])^(1-0.217)) - i*(0.018[S/m])/2*pi*freq*e_0  // Complex permittivity of cortical bone
  ep_fat = 2.32 + 2.14/(1+(i*freq/20.1[GHz])^(1-0.002)) + 19.7/(1+(i*freq/8.25[MHz])^(1-0.259)) - i*(0.0222[S/m])/2*pi*freq*e_0  // Complex permittivity of fat
  ep_heart = 3.84 + 49.1/(1+(i*freq/18.7[GHz])^(1-0.049)) + 2520/(1+(i*freq/1.73[MHz])^(1-0.196)) - i*(0.31[S/m])/2*pi*freq*e_0  // Complex permittivity of heart
  ep_kidney = 4.43 + 43.3/(1+(i*freq/20.2[GHz])^(1-0.052)) + 2050/(1+(i*freq/2.87[MHz])^(1-0.212)) - i*(0.267[S/m])/2*pi*freq*e_0  // Complex permittivity of the kidney
  ep_lung_inflated = 4.44+ 14.6/(1+(i*freq/16.1[GHz])^(1-0.001)) + 646/(1+(i*freq/3.22[MHz])^(1-0.181)) - i*(0.0842[S/m])/2*pi*freq*e_0  // Complex permittivity of the inflated lung
  ep_muscle = 3.91+ 55/(1+(i*freq/18[GHz])^(1-0.165)) + 663/(1+(i*freq/0.78[MHz])^(1-0.387)) - i*(0.633[S/m])/2*pi*freq*e_0  // Complex permittivity of muscle
  ep_skin_dry = 5.01+ 31.4/(1+(i*freq/19.9[GHz])^(1-0.066)) + 830/(1+(i*freq/6.77[MHz])^(1-0.139)) - i*(0.005[S/m])/2*pi*freq*e_0  // Complex permittivity of skin (dry)
  ep_skin_wet = 2.64+ 45.7/(1+(i*freq/17.6[GHz])^(1-0.177)) + 3660/(1+(i*freq/1.47[MHz])^(1-0.097)) - i*(0.13[S/m])/2*pi*freq*e_0  // Complex permittivity of skin (wet)
  er_aorta = real(ep_aorta)  // Relative permittivity of the aorta
  er_blood = real(ep_blood)  // Relative permittivity of blood
  er_bone_can = real(ep_bone_can)  // Relative permittivity of cancellous bone
  er_bone_cort = real(ep_bone_cort)  // Relative permittivity of cortical bone
  er_fat = real(ep_fat)  // Relative permittivity of fat
  er_heart = real(ep_heart)  // Relative permittivity of the heart
  er_kidney = real(ep_kidney)  // Relative permittivity of the kidney
  er_lung_inflated = real(ep_lung_inflated)  // Relative permittivity of lung tissue (inflated)
  er_muscle = real(ep_muscle)  // Relative permittivity of muscle
  er_skin_dry = real(ep_skin_dry)  // Relative permittivity of dry skin
  er_skin_wet = real(ep_skin_wet)  // Relative permittivity of wet skin
  L_chest = 2[cm]  // Length of chest area
  L_electrode = 5[mm]  // Length of electrode
  t_aorta = 26.6 [mm]  // Average diameter of the human aorta (normal weight)
  t_aortawall = 4 [mm]  // Aorta wall thickness (healthy)
  t_electrode = L_electrode/4  // Thickness of electrode
  t_fat = 11.1[mm]/2  // Average thickness of the fat at the chest
  t_lung = 4.1[mm]  // Average thickness of the upper section of left lung
  t_model = t_lung+t_rib+t_pect+t_fat+t_skin  // Thickness of entire model
  t_pect = 4[mm]  // Average thickness of the pectorialis muscle
  t_rib = 6 [mm]  // Average thickness of a human rib
  t_rib_cancellous = 0.9 [mm]  // Thickness of the Cancellous Bone part of the human ribs
  t_skin = 6052.5 [um]  // Average thickness of the skin at the chest (male)
  W_chest = 5*W_rib  // Width of chest area
  W_electrode = 2.5 [cm]  // Width of electrode
  W_rib = 11.3 [mm]  // Vertical height of the rib.
  z_electrode = 2 [mm]  // Spacing between electrodes
  t_heart_muscle = 10.6 [mm]  // Thickness of the muscles of the heart wall.
  L_heart = 12 [cm]  // Length of the heart from base to apex
  W_heart = 8 [cm]  // Width of the heart
  t_heart = 6 [cm]  // Thickness of the heart
  ang_electrode = (W_electrode/t_aorta)*(180/pi)  // Sector angle used to build aorta electrodes
  h_aorta = 3 [cm]  // Height of aorta from heart
  ang_space = (z_electrode/t_aorta)*(180/pi)  // Sector angle used for electrode spacing
  ang_electrode_heart = (W_electrode/(t_heart/2))*(180/pi)  // Sector angle for electrode spacing on heart
  ang_space_heart = (z_electrode/(t_heart/2))*(180/pi)  // Sector anagel for electrode on heart
  W_model = 0.15[m]
  L_model = 0.17 [m]

Geometry
  geom1 "Geometry 1" (3D, length unit m)
    sph1: Sphere | r = W_heart/2
    elp1: Ellipsoid | semiaxes = {W_heart/2, W_heart/2, L_heart/2}
    blk1: Block | pos = {0, 0, L_heart/2}; base = center; size = {L_heart, L_heart, L_heart}
    dif1: Difference | input = elp1; input2 = blk1
    blk3: Block | pos = {0, 0, -L_heart/2}; base = center; size = {L_heart, L_heart, L_heart}
    dif2: Difference | input = sph1; input2 = blk3
    uni1: Union "Outer Heart Model" | input = dif1, dif2
    sca1: Scale "Inner Heart Model"
      input = uni1
      keep = on
      isotropic = 0.823
      anisotropic = {t_heart_muscle, t_heart_muscle, t_heart_muscle}
      factor = 0.823
    dif3: Difference | input = uni1; input2 = sca1; keepsubtract = on
    cyl2: Cylinder "Aorta" | pos = {0, 0, W_heart/2 - t_heart_muscle}; ax2 = {0.0, 0.0}; r = t_aorta/2; h = 3 [cm]
    cyl4: Cylinder "Inner Aorta"
      pos = {0, 0, W_heart/2 - t_heart_muscle}
      ax2 = {0.0, 0.0}
      r = t_aorta/2 - t_aortawall/2
      h = 3 [cm]
    dif4: Difference | input = cyl2; input2 = cyl4; keepsubtract = on
    uni2: Union "Blood" | input = cyl4, sca1; intbnd = off; face = all
    int1: Intersection | input = dif4, uni2; keep = on
    int2: Intersection | input = dif3, dif4; keep = on
    uni3: Union | input = int1, int2; intbnd = off; face = all
    dif5: Difference | input = dif4; input2 = uni3; keepsubtract = on
    uni4: Union "Heart Tissue" | input = dif3, uni3
    uni5: Union "Heart Model" | input = dif5, uni2, uni4
    wp1: WorkPlane "Aorta Signal Electrode" | quickz = W_heart/2; unite = on
      ca1: CircularArc
        r = t_aorta/2
        point1 = {-0.0110266401893, -0.0074366125444}
        point2 = {-0.00049988223268, -0.0132906026106}
        angle1 = -90 - ang_electrode - ang_space/2
        angle2 = -90 - ang_space/2
      ca2: CircularArc
        r = t_aorta/2
        point1 = {0.00049988223268, -0.0132906026106}
        point2 = {0.0110266401893, -0.0074366125444}
        angle1 = -90 + ang_space/2
        angle2 = -90 + ang_space/2 + ang_electrode
    ext1: Extrude | workplane = wp1; input = wp1; distance = W_electrode/2
    wp2: WorkPlane "Aorta Ground Electrode" (disabled) | quickz = W_heart/2; unite = on
      ca1: CircularArc
        r = t_aorta/2
        point1 = {-0.00602249601023, -0.0118583110858}
        point2 = {0.00602249601023, -0.0118583110858}
        angle1 = -90 - ang_electrode/2
        angle2 = -90 + ang_electrode/2
    ext2: Extrude (disabled) | workplane = wp2; input = wp2; distance = W_electrode/2
    wp3: WorkPlane "Heart Ground Electrode"
      quickz = - W_heart/2
      vertex1 = uni5(1) points 21
      vertex2 = uni5(1) points 11
      transaxistype = x
      transrot = -45
      unite = on
      ca1: CircularArc
        r = t_heart/2
        point1 = {-0.0228652581874, -0.0194211216984}
        point2 = {-0.000999814825103, -0.0299833348765}
        angle1 = -90 - ang_space_heart/2 - ang_electrode_heart
        angle2 = -90 - ang_space_heart/2
      ca2: CircularArc
        r = t_heart/2
        point1 = {0.000999814825103, -0.0299833348765}
        point2 = {0.0228652581874, -0.0194211216984}
        angle1 = -90 + ang_space_heart/2
        angle2 = -90 + ang_space_heart/2 + ang_electrode_heart
    ext3: Extrude | workplane = wp3; input = wp3; distance = W_electrode
    wp4: WorkPlane "Heart Signal Electrode" (disabled)
      quickz = - W_heart/2 +z_electrode + W_electrode
      vertex1 = uni5(1) points 21
      vertex2 = uni5(1) points 11
      transaxistype = x
      transrot = -45
      unite = on
      ca1: CircularArc
        r = t_heart/2
        point1 = {-0.0135845774667, -0.0267480701183}
        point2 = {0.0135845774667, -0.0267480701183}
        angle1 = -90 - ang_electrode/2
        angle2 = -90 + ang_electrode/2
    ext4: Extrude (disabled) | workplane = wp4; input = wp4; distance = W_electrode
    rot1: Rotate | input = ext3; pos = {0, -t_heart/2, -W_heart/2}; axistype = x; rot = 20
    mov1: Move | input = rot1; displx = 0; disply = 0.2[mm]; displz = 0
    blk4: Block "Blood Block" | base = center; size = {W_model, L_model, L_heart}
    fin: Finalize "Form Union"

Materials
  mat7: Common "Blood" on domains 1, 4, 5, 8, 9
    def "Basic"
      electricconductivity = cond_blood
      relpermittivity = er_blood
  mat8: Common "Aorta" on domains 6, 7
    def "Basic"
      electricconductivity = cond_aorta
      relpermittivity = er_aorta
  mat9: Common "Heart Tissue" on domains 2, 3
    def "Basic"
      electricconductivity = cond_heart
      relpermittivity = er_heart

Physics
  ec: ConductiveMedia "Electric Currents" on all domains
    dependent variable V
    cucn1: CurrentConservation (default)
    ein1: ElectricInsulation (default)
    init1: init "Initial Values 1" (default)
    bcs1: BoundaryCurrentSource (disabled) on no boundaries | Qjs = 1
    gnd1: Ground on boundaries 39
    term1: Terminal on boundaries 68 | I0 = 0.0008
    term2: Terminal on boundaries 69 | TerminalType = Circuit
    term3: Terminal on boundaries 15 | TerminalType = Circuit
  cir: Circuit "Electrical Circuit"
    dependent variable voltages
    gnd1: GroundNode
    R1: Resistor | Connections = {2, 3}
    IvsU1: ModelDeviceIV "External I vs. U 1" | V_src = root.comp1.ec.V0_2; Connections = {2, 0}
    IvsU2: ModelDeviceIV "External I vs. U 2" | V_src = root.comp1.ec.V0_3; Connections = {3, 0}

Mesh
  mesh1 "Mesh 1" (physics-controlled)

Studies
  std1 "Study 1"
    param: Parametric "Parametric Sweep" (disabled)
      pname = W_electrode
      plistarr = range(1 [cm],0.5 [cm],2.5 [cm])
      punit = m
    param1: Parametric "Parametric Sweep 1" (disabled)
      pname = W_model
      plistarr = range(10 [cm],1 [cm],15 [cm])
      punit = m
    param2: Parametric "Parametric Sweep 2" (disabled)
      pname = L_model
      plistarr = range(12 [cm],1 [cm],17 [cm])
      punit = m
    freq: Frequency "Frequency Domain" | plist = range(1 [MHz],0.5 [MHz],80 [MHz])

Solver configurations
  sol1 "Solution 1" (study std1)
    v1: Variables "Dependent Variables 1"
    s1: Stationary "Stationary Solver 1" | linpmethod = sol
      p1: Parametric | pname = freq; plistarr = range(1 [MHz],0.5 [MHz],80 [MHz]); punit = Hz; pcontinuationmode = no
      fc1: FullyCoupled | linsolver = i1
      i1: Iterative | linsolver = bicgstab; nlinnormuse = on
        mg1: Multigrid
        dp1: DirectPreconditioner | linsolver = pardiso

Datasets
  dset1: Solution | solution = sol1

Derived values
  gev1: EvalGlobal "Channel Response"
    data = dset1
    table = tbl1
    expr = (ec.V0_2 - ec.V0_3)/ec.V0_1
    unit = 1
    descr = Channel Response

Tables
  mrkvl1: Table "Intersections"
    // Graph marker
    freq (MHz) | Voltage Gain/ dB
    18.375 | -47.8303
    23.625 | -47.8563
  mrkvl2: Table "Intersections 1"
    // Graph marker
    freq (MHz) | Power Gain/ dB
    18.375 | -61.1082
    23.625 | -61.3868
  mrkvl3: Table "Intersections 2"
    // Graph marker
    freq (MHz) | Transimpedance (Ω)
    18.375 | 0.190854
    23.625 | 0.17953
  mrkvl4: Table "Intersections 3"
    // Graph marker
    freq (MHz) | Transimpedance (Ω)
    18.375 | 0.190854
    23.625 | 0.17953
  mrkvl5: Table "Intersections 4"
    // Graph marker
    freq (MHz) | Phase (1)
    18.375 | -1.01449
    23.625 | -0.551931
  tbl1: Table
    // Channel Response
    freq (Hz) | Channel Response (1)
    1e+06 | 0.00450288+1.64678e-05i
    1.5e+06 | 0.00444967-7.83273e-05i
    2e+06 | 0.00440143-0.000125291i
    2.5e+06 | 0.00436051-0.000150748i
    3e+06 | 0.00432598-0.000164933i
    3.5e+06 | 0.00429659-0.000172614i
    4e+06 | 0.00427131-0.000176284i
    4.5e+06 | 0.00424938-0.000177348i
    5e+06 | 0.00423011-0.000176688i
    5.5e+06 | 0.00421309-0.000174835i
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
Plots
  pg1: PlotGroup3D "Electric Potential (ec)" | data = dset1
    slc1: Slice | expr = ec.normE; descr = Electric field norm; quickxnumber = 1
  pg2: PlotGroup3D "Electric Field Norm (ec)" | data = dset1
    mslc1: Multislice
      expr = ec.normE
      multiplanexmethod = coord
      xcoord = ec.CPx
      multiplaneymethod = coord
      ycoord = ec.CPy
      multiplanezmethod = coord
      zcoord = ec.CPz
    strmsl1: StreamlineMultislice
      expr = {ec.Ex, ec.Ey, ec.Ez}
      multiplanexmethod = coord
      xcoord = ec.CPx
      multiplaneymethod = coord
      ycoord = ec.CPy
      multiplanezmethod = coord
      zcoord = ec.CPz
      udist = 0.02
      col1: Color "Color Expression 1" | expr = ec.normE
      filt1: Filter | expr = !isScalingSystemDomain
  pg4: PlotGroup1D "Voltage Gain against Frequency" | data = dset1
    glob1: Global "Voltage Gain"
      data = dset1
      expr = 20*log10(abs((ec.V0_2 - ec.V0_3)/ec.V0_1))
      descr = Voltage Gain/ dB
      title = Voltage Gain against Frequency
      gmrk1: GraphMarker
        displaymode = intersection
        intersectionx = range(18.375,5.25,23.625)
        includexcoord = on
        pointradius = 5
        anchorpoint = lowerleft
        table = mrkvl1
  pg5: PlotGroup1D "Power Gain against Frequency" | data = dset1
    glob1: Global "Power Gain"
      data = dset1
      expr = 10*log10(abs((((ec.V0_2 - ec.V0_3)^2)/1000)/(ec.I0_1*ec.V0_1)))
      descr = Power Gain/ dB
      title = Power Gain against Frequency
      gmrk1: GraphMarker
        displaymode = intersection
        intersectionx = range(18.375,5.25,23.625)
        includexcoord = on
        pointradius = 5
        anchorpoint = lowerleft
        table = mrkvl2
  pg6: PlotGroup1D "Transimpedance against Frequency" | data = dset1; title = Transimpedance against Frequency
    glob1: Global "Transimpedance"
      data = dset1
      expr = abs((ec.V0_2 - ec.V0_3)/ec.I0_1)
      unit = Ω
      descr = Transimpedance
      title = Power Gain against Frequency
      gmrk1: GraphMarker
        displaymode = intersection
        intersectionx = range(18.375,5.25,23.625)
        includexcoord = on
        pointradius = 5
        anchorpoint = lowerleft
        table = mrkvl4
  pg7: PlotGroup1D "Phase against Frequency"
    data = dset1
    title = Phase Response
    ylabel = Phase/ deg
    touchpostshow = on
    glob1: Global "Phase"
      data = dset1
      expr = (arg((ec.V0_2 - ec.V0_3)/ec.V0_1))*(180/pi)
      unit = 1
      descr = Phase
      title = Power Gain against Frequency
      gmrk1: GraphMarker
        displaymode = intersection
        intersectionx = range(18.375,5.25,23.625)
        includexcoord = on
        pointradius = 5
        anchorpoint = lowerright
        table = mrkvl5
  pg3: PlotGroup3D "Electric Field Norm (ec) 1"
    data = dset1
    title = Current Density (dB) across the Aorta to Heart Model
    touchpostshow = on
    mslc1: Multislice
      data = dset1
      expr = 10*log10(ec.normJ)
      descr = Electric Field
      title = Electric Field Density (dB) across the Aorta to Chest Model
      xcoord = 0
      ynumber = 0
      ycoord = ec.CPy
      znumber = 0
      zcoord = 0