// COMSOL Multiphysics 6.1.0.282 model "CM3_KidneytoBack.mph"
// Outline of the model tree

Parameters
  ep_skin_dry = 5.01+ 31.4/(1+(i*freq/19.9[GHz])^(1-0.066)) + 830/(1+(i*freq/6.77[MHz])^(1-0.139)) - i*(0.005[S/m])/2*pi*freq*e_0  // Complex permittivity of skin (dry)
  ep_skin_wet = 2.64+ 45.7/(1+(i*freq/17.6[GHz])^(1-0.177)) + 3660/(1+(i*freq/1.47[MHz])^(1-0.097)) - i*(0.13[S/m])/2*pi*freq*e_0  // Complex permittivity of skin (wet)
  ep_muscle = 3.91+ 55/(1+(i*freq/18[GHz])^(1-0.165)) + 663/(1+(i*freq/0.78[MHz])^(1-0.387)) - i*(0.633[S/m])/2*pi*freq*e_0  // Complex permittivity of muscle
  ep_lung_inflated = 4.44+ 14.6/(1+(i*freq/16.1[GHz])^(1-0.001)) + 646/(1+(i*freq/3.22[MHz])^(1-0.181)) - i*(0.0842[S/m])/2*pi*freq*e_0  // Complex permittivity of the inflated lung
  ep_kidney = 4.43 + 43.3/(1+(i*freq/20.2[GHz])^(1-0.052)) + 2050/(1+(i*freq/2.87[MHz])^(1-0.212)) - i*(0.267[S/m])/2*pi*freq*e_0  // Complex permittivity of the kidney
  ep_heart = 3.84 + 49.1/(1+(i*freq/18.7[GHz])^(1-0.049)) + 2520/(1+(i*freq/1.73[MHz])^(1-0.196)) - i*(0.31[S/m])/2*pi*freq*e_0  // Complex permittivity of heart
  ep_bone_cort = 3.22 + 10/(1+(i*freq/9.49[GHz])^(1-0.218)) + 693/(1+(i*freq/0.414[MHz])^(1-0.217)) - i*(0.018[S/m])/2*pi*freq*e_0  // Complex permittivity of cortical bone
  ep_bone_can = 4.21 + 12.1/(1+(i*freq/15.6[GHz])^(1-0.003)) + 917/(1+(i*freq/0.471[MHz])^(1-0.33)) - i*(0.0231[S/m])/2*pi*freq*e_0  // Complex permittivity of cancellous bone
  ep_fat = 2.32 + 2.14/(1+(i*freq/20.1[GHz])^(1-0.002)) + 19.7/(1+(i*freq/8.25[MHz])^(1-0.259)) - i*(0.0222[S/m])/2*pi*freq*e_0  // Complex permittivity of fat
  ep_aorta = 2.27 + 28.2/(1+(i*freq/15.2[GHz])^(1-0.001)) + 1360/(1+(i*freq/0.0225[MHz])^(1-0.59)) - i*(0.292[S/m])/2*pi*freq*e_0  // Complex permittivity of aorta
  e_0 = 8.85E-12 [F/m]  // Permittivity of a vacuum
  t_kidney = 4 [cm]  // Average thickness of the kidney
  t_muscle = 2.87 [cm]  // Average thickness of the posterior trunk muscles.
  t_fat = 4 [mm]  // Average thickness of the fat at the back
  t_skin = 116 [um]  // Average thickness of the skin at the back (male)
  L_back = 2[cm]  // Length of back area
  W_back = W_kidney + 6[cm]  // Width of back area
  L_electrode = 5[mm]  // Length of electrode
  W_electrode = 15[mm]  // Width of electrode
  t_electrode = L_electrode/4  // Thickness of electrode
  t_model = t_lung+t_rib+t_pect+t_fat+t_skin  // Thickness of entire model
  er_lung_inflated = real(ep_lung_inflated)  // Relative permittivity of lung tissue (inflated)
  cond_lung_inflated = e_0*imag(ep_lung_inflated)*2*pi*freq [S/m]  // Conductivity of lung tissue (inflated)
  er_bone_can = real(ep_bone_can)  // Relative permittivity of cancellous bone
  cond_bone_can = e_0*imag(ep_bone_can)*2*pi*freq [S/m]  // Conductivity of cancellous bone
  er_muscle = real(ep_muscle)  // Relative permittivity of muscle
  cond_muscle = e_0*imag(ep_muscle)*2*pi*freq [S/m]  // Conductivity of muscle
  er_fat = real(ep_fat)  // Relative permittivity of fat
  cond_fat = e_0*imag(ep_fat)*2*pi*freq [S/m]  // Conductivity of fat
  er_skin_wet = real(ep_skin_wet)  // Relative permittivity of wet skin
  cond_skin_wet = e_0*imag(ep_skin_wet)*2*pi*freq [S/m]  // Conductivity of wet skin
  er_skin_dry = real(ep_skin_dry)  // Relative permittivity of dry skin
  cond_skin_dry = e_0*imag(ep_skin_dry)*2*pi*freq [S/m]  // Conductivity of dry skin
  z_electrode = 2 [mm]  // Spacing between electrodes
  er_kidney = real(ep_kidney)  // Relative permittivity of the kidney tissue
  cond_kidney = e_0*imag(ep_kidney)*2*pi*freq [S/m]  // Conductivity of the kidney tissue
  L_kidney = 11 [cm]  // Length of the Kidney
  t_rib = 6 [mm]  // Thickness of rib 12
  t_rib_cancellous = 0.9 [mm]  // Thickness of cancellous bone
  W_rib = 11.3 [mm]  // Width of rib 12
  W_kidney = 6 [cm]  // Width of the human kidney
  L_mid = 1 [cm]  // Length of the middle of kidney
  L_c1 = (L_kidney - L_mid)/4  // Radius of 2 circles to make kidney
  L_c2 = W_kidney - L_c1/2  // Radius of arc to build kidney
  ep_blood = 11.8 + 41.4/(1+(i*freq/15.8[GHz])^(1-0.015)) + 7930/(1+(i*freq/0.947[MHz])^(1-0.092)) - i*(0.996[S/m])/2*pi*freq*e_0  // Complex permittivity of blood
  er_blood = real(ep_blood)  // Relative permittivity of blood
  cond_blood = abs(e_0*imag(ep_blood)*2*pi*freq) [S/m]  // Conductivity of the human blood
  cond_bone_cort = abs(e_0*imag(ep_bone_cort)*2*pi*freq) [S/m]  // Conductivity of cortical bone
  er_bone_cort = real(ep_bone_cort)  // Relative permittivity of cortical bone

Geometry
  geom1 "Geometry 1" (3D, length unit m)
    wp1: WorkPlane "Posterior Model" | quickplane = xz; unite = on
      r1: Rectangle "Kidney" (disabled) | base = center; size = {t_kidney, W_kidney}
      r10: Rectangle "Rib 12"
        pos = {- (t_kidney/2 + t_rib/2), L_kidney/2 - W_rib/2}
        base = center
        size = {t_rib, W_rib}
      r12: Rectangle "Rib 12 Cancellous"
        pos = {- (t_kidney/2 + t_rib/2), L_kidney/2 - W_rib/2}
        base = center
        size = {t_rib - t_rib_cancellous, W_rib - t_rib_cancellous}
      dif1: Difference | input = r10; input2 = r12; keepsubtract = on
      r11: Rectangle "Connective Muscle"
        pos = {- (t_kidney/2 + t_rib/2), -W_rib/2}
        base = center
        size = {t_rib, L_kidney - W_rib}
      r5: Rectangle "Posterior Trunk Muscles"
        pos = {- (t_kidney/2 + t_rib + t_muscle/2), 0}
        base = center
        size = {t_muscle, L_kidney}
      r2: Rectangle "Fat"
        pos = {- (t_kidney/2 + t_rib + t_muscle + t_fat/2), 0}
        base = center
        size = {t_fat, L_kidney}
      r9: Rectangle "Skin"
        pos = {- (t_kidney/2 + t_rib + t_muscle + t_fat + t_skin/2), 0}
        base = center
        size = {t_skin, L_kidney}
    ext1: Extrude | workplane = wp1; input = wp1; distance = W_back
    wp4: WorkPlane | quickplane = yz; quickx = -t_kidney/2; unite = on
      c1: Circle | pos = {-L_c1, L_c1 + L_mid/2}; r = L_c1
      c2: Circle | pos = {-L_c1, -(L_c1 + L_mid/2)}; r = L_c1
      pt1: Point (disabled) | p = {-W_kidney, }
      ic1: InterpolationCurve
        table = 
          {-L_c1, L_kidney/2}
          {- (L_c1 + L_c1*cos(pi/4)), L_kidney/2 - (L_c1 - L_c1*sin(pi/4))}
          {-W_kidney, 0}
          {- (L_c1 + L_c1*cos(pi/4)), -(L_kidney/2 - (L_c1 - L_c1*sin(pi/4)))}
          {-L_c1, -L_kidney/2}
        starttang = {-0.155664146519, -0.0197926953722}
        endtang = {0.155664146519, -0.0197926953722}
      ic2: InterpolationCurve
        table = 
          {-(L_c1-L_c1*cos(pi/4)), L_kidney/2 - (L_c1 + L_c1*sin(pi/4))}
          {-0.01, 0}
          {-(L_c1-L_c1*cos(pi/4)), -(L_kidney/2 - (L_c1 + L_c1*sin(pi/4)))}
        starttang = {-0.0107106781187, -0.0246446609407}
        endtang = {0.0107106781187, -0.0246446609407}
      r1: Rectangle | pos = {-W_kidney/2, 0}; base = center; size = {W_kidney, L_kidney}
      csol1: ConvertToSolid | input = c1, c2, ic1, ic2
      dif1: Difference | input = r1; input2 = csol1
      r2: Rectangle | pos = {-W_kidney/2, 0}; base = center; size = {W_kidney, L_kidney}
      dif2: Difference | input = r2; input2 = dif1
      mov1: Move | input = dif2; displx = -(W_back - W_kidney)/2; disply = 0
    ext4: Extrude | workplane = wp4; input = wp4; distance = t_kidney
    wp2: WorkPlane "Back Electrodes"
      quickplane = yz
      quickx = -(t_kidney/2 + t_rib + t_muscle + t_fat + t_skin)
      unite = on
      r1: Rectangle "Electrode"
        pos = {-W_kidney/2, W_electrode/2 + z_electrode/2}
        base = center
        size = {W_electrode, W_electrode}
      r2: Rectangle "Ground Electrode"
        pos = {-W_kidney/2, -(W_electrode/2 + z_electrode/2)}
        base = center
        size = {W_electrode, W_electrode}
      mov1: Move | input = r1, r2; displx = -(W_back - W_kidney)/2; disply = 0
    wp5: WorkPlane "Kidney Electrodes" | quickplane = yz; quickx = t_kidney/2; unite = on
      r1: Rectangle "Electrode"
        pos = {-W_kidney/2, W_electrode/2 + z_electrode/2}
        base = center
        size = {W_electrode, W_electrode}
      r2: Rectangle "Ground Electrode"
        pos = {-W_kidney/2, -(W_electrode/2 + z_electrode/2)}
        base = center
        size = {W_electrode, W_electrode}
      mov2: Move | input = r1, r2; displx = -(W_back - W_kidney)/2; disply = 0
    blk1: Block | pos = {0, -W_back/2, 0}; base = center; size = {t_kidney, W_back, L_kidney}
    fin: Finalize "Form Union"

Materials
  mat1: Common "Kidney Tissue" on domains 8
    def "Basic"
      electricconductivity = cond_kidney
      relpermittivity = er_kidney
  mat3: Common "Muscle" on domains 3, 4
    def "Basic"
      electricconductivity = cond_muscle
      relpermittivity = er_muscle
  mat4: Common "Fat" on domains 2
    def "Basic"
      electricconductivity = cond_fat
      relpermittivity = er_fat
  mat5: Common "Skin" on domains 1
    def "Basic"
      electricconductivity = cond_skin_wet
      relpermittivity = er_skin_wet
  mat6: Common "Blood" on domains 7, 9
    def "Basic"
      electricconductivity = cond_blood
      relpermittivity = er_blood
  mat7: Common "Bone Cancellous" on domains 5
    def "Basic"
      relpermittivity = er_bone_can
      electricconductivity = cond_bone_can
  mat8: Common "Bone Cortical" on domains 6
    def "Basic"
      relpermittivity = er_bone_cort
      electricconductivity = cond_bone_cort

Physics
  ec: ConductiveMedia "Electric Currents" on all domains
    dependent variable V
    cucn1: CurrentConservation (default)
    ein1: ElectricInsulation (default)
    init1: init "Initial Values 1" (default)
    bcs1: BoundaryCurrentSource on boundaries 5, 6 | Qjs = 1
    gnd1: Ground on boundaries 56
    term1: Terminal on boundaries 57 | I0 = 0.0008
    term2: Terminal on boundaries 6 | TerminalType = Circuit
    term3: Terminal on boundaries 5 | TerminalType = Circuit
  cir: Circuit "Electrical Circuit"
    dependent variable voltages
    gnd1: GroundNode
    R1: Resistor | Connections = {2, 3}
    IvsU1: ModelDeviceIV "External I vs. U 1" | V_src = root.comp1.ec.V0_2; Connections = {2, 0}
    IvsU2: ModelDeviceIV "External I vs. U 2" | V_src = root.comp1.ec.V0_3; Connections = {3, 0}

Mesh
  mesh1 "Mesh 1" (physics-controlled)
    size: MeshSizeDefault | hauto = 6

Studies
  std1 "Study 1"
    param: Parametric "Parametric Sweep"
      sweeptype = filled
      pname = {W_back, W_electrode}
      plistarr = {range(W_kidney,2 [cm],16 [cm]), range(1 [cm],0.5 [cm],2.5 [cm])}
      punit = {m, m}
    param1: Parametric "Parametric Sweep 1" (disabled)
      pname = W_electrode
      plistarr = range(1 [cm],0.5 [cm],2.5 [cm])
      punit = m
    freq: Frequency "Frequency Domain" | plist = range(1 [MHz],0.5 [MHz],80 [MHz])

Solver configurations
  sol1 "Solution 1" (study std1)
    v1: Variables "Dependent Variables 1"
    s1: Stationary "Stationary Solver 1" | linpmethod = sol
      p1: Parametric | pname = freq; plistarr = range(1 [MHz],0.5 [MHz],80 [MHz]); punit = Hz; pcontinuationmode = no
      fc1: FullyCoupled | linsolver = dDef
      dDef: Direct
  sol2 "Parametric Solutions 1" (study std1)

Datasets
  dset2: Solution | solution = sol2

Derived values
  gev1: EvalGlobal "Channel Response"
    data = dset2
    table = tbl1
    hasouter = on
    tablecols = outer
    expr = (ec.V0_2 - ec.V0_3)/ec.V0_1
    unit = 1
    descr = Channel Response

Tables
  mrkvl1: Table "Intersections"
    // Graph marker
    freq (MHz) | Voltage Gain/ dB
    18.375 | -29.0549
    23.625 | -28.7803
  mrkvl2: Table "Intersections 1"
    // Graph marker
    freq (MHz) | Voltage Gain/ dB
    18.375 | -29.0549
    23.625 | -28.7803
  mrkvl3: Table "Intersections 2"
    // Graph marker
    freq (MHz) | Power Gain/ dB
    18.375 | -44.1103
    23.625 | -44.1655
  mrkvl4: Table "Intersections 3"
    // Graph marker
    freq (MHz) | Transimpedance (Ω)
    18.375 | 1.10082
    23.625 | 1.05309
  mrkvl5: Table "Intersections 4"
    // Graph marker
    freq (MHz) | Phase (1)
    18.375 | 40.4926
    23.625 | 39.186
  tbl1: Table
    // Channel Response
    freq (Hz) | W_back=0.14, W_electrode=0.025, Channel Response (1)
    1e+06 | 0.00246896+0.00620563i
    1.5e+06 | 0.00445885+0.00818163i
    2e+06 | 0.00633082+0.0097591i
    2.5e+06 | 0.0080413+0.011106i
    3e+06 | 0.00959832+0.0122931i
    3.5e+06 | 0.0110169+0.0133543i
    4e+06 | 0.0123116+0.0143089i
    4.5e+06 | 0.0134956+0.0151706i
    5e+06 | 0.0145808+0.0159498i
    5.5e+06 | 0.0155773+0.0166552i
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
Plots
  pg4: PlotGroup1D "Voltage Gain against Frequency" | data = dset2
    glob1: Global "Voltage Gain"
      data = dset2
      expr = 20*log10(abs((ec.V0_2 - ec.V0_3)/ec.V0_1))
      descr = Voltage Gain/ dB
      title = Voltage Gain against Frequency
      hasmultilevel = on
      gmrk1: GraphMarker
        displaymode = intersection
        intersectionx = range(18.375,5.25,23.625)
        includexcoord = on
        pointradius = 5
        table = mrkvl2
  pg5: PlotGroup1D "Power Gain against Frequency" | data = dset2; touchpostshow = on
    glob1: Global "Power Gain"
      data = dset2
      expr = 10*log10(abs((((ec.V0_2 - ec.V0_3)^2)/1000)/(ec.I0_1*ec.V0_1)))
      descr = Power Gain/ dB
      title = Power Gain against Frequency
      hasmultilevel = on
      legends = {"W_back=0.06 m, Power Gain/ dB", "W_back=0.08 m, Power Gain/ dB", "W_back=0.1 m, Power Gain/ dB", "W_back=0.12 m, Power Gain/ dB", "W_back=0.14 m, Power Gain/ dB", "W_back=0.16 m, Power Gain/ dB"}
      gmrk1: GraphMarker
        displaymode = intersection
        intersectionx = range(18.375,5.25,23.625)
        includexcoord = on
        pointradius = 5
        anchorpoint = lowermiddle
        orientation = vertical
        table = mrkvl3
  pg6: PlotGroup1D "Transimpedance against Frequency" | data = dset2; title = Transimpedance against Frequency
    glob1: Global "Transimpedance"
      data = dset2
      expr = abs((ec.V0_2 - ec.V0_3)/ec.I0_1)
      unit = Ω
      descr = Transimpedance
      title = Power Gain against Frequency
      hasmultilevel = on
      legends = {"W_back=0.06 m, Transimpedance", "W_back=0.08 m, Transimpedance", "W_back=0.1 m, Transimpedance", "W_back=0.12 m, Transimpedance", "W_back=0.14 m, Transimpedance", "W_back=0.16 m, Transimpedance"}
      gmrk1: GraphMarker
        displaymode = intersection
        intersectionx = range(18.375,5.25,23.625)
        includexcoord = on
        pointradius = 5
        anchorpoint = lowerright
        table = mrkvl4
  pg7: PlotGroup1D "Phase against Frequency" | data = dset2; title = Phase Response; ylabel = Phase/ deg
    glob1: Global "Phase"
      data = dset2
      expr = (arg((ec.V0_2 - ec.V0_3)/ec.V0_1))*(180/pi)
      unit = 1
      descr = Phase
      title = Power Gain against Frequency
      hasmultilevel = on
      legends = {"W_back=0.06 m, Phase", "W_back=0.08 m, Phase", "W_back=0.1 m, Phase", "W_back=0.12 m, Phase", "W_back=0.14 m, Phase", "W_back=0.16 m, Phase"}
      gmrk1: GraphMarker
        displaymode = intersection
        intersectionx = range(18.375,5.25,23.625)
        includexcoord = on
        pointradius = 5
        anchorpoint = middleleft
        table = mrkvl5
  pg3: PlotGroup3D "Electric Field Norm (ec) 1"
    data = dset2
    title = Current Density (dB) across the Aorta to Chest Model
    mslc1: Multislice
      data = dset2
      expr = 10*log10(ec.normJ)
      descr = Electric Field
      title = Electric Field Density (dB) across the Aorta to Chest Model
      xnumber = 0
      xcoord = 0
      ycoord = ec.CPy
      znumber = 0
      zcoord = 0
  pg8: PlotGroup3D "Electric Potential (ec) 1" | data = dset2
    vol1: Volume (disabled) | expr = V
    slc1: Slice
      expr = ec.normE
      descr = Electric field norm
      title = Electric Field Density (V/m) across the Kidney to Back Model
      quickplane = xy
      quickznumber = 1
      quickxnumber = 1
  pg9: PlotGroup3D "Electric Field Norm (ec) 2" | data = dset2; touchpostshow = on
    mslc1: Multislice
      expr = ec.normE
      unit = V/m
      descr = Electric field norm
      multiplanexmethod = coord
      xcoord = ec.CPx
      multiplaneymethod = coord
      ycoord = ec.CPy
      multiplanezmethod = coord
      zcoord = ec.CPz
      rangeisshared = on
    strmsl1: StreamlineMultislice
      expr = {ec.Ex, ec.Ey, ec.Ez}
      unit = {V/m, V/m, V/m}
      descr = Electric field
      multiplanexmethod = coord
      xcoord = ec.CPx
      multiplaneymethod = coord
      ycoord = ec.CPy
      multiplanezmethod = coord
      zcoord = ec.CPz
      udist = 0.02
      col1: Color "Color Expression 1" | unit = V/m; expr = ec.normE; descr = Electric field norm
      filt1: Filter | expr = !isScalingSystemDomain