// COMSOL Multiphysics 6.1.0.282 model "CM4_RenalVeintoBack.mph"
// Outline of the model tree

Parameters
  ep_skin_dry = 5.01+ 31.4/(1+(i*freq/19.9[GHz])^(1-0.066)) + 830/(1+(i*freq/6.77[MHz])^(1-0.139)) - i*(0.005[S/m])/2*pi*freq*e_0  // Complex permittivity of skin (dry)
  ep_skin_wet = 2.64+ 45.7/(1+(i*freq/17.6[GHz])^(1-0.177)) + 3660/(1+(i*freq/1.47[MHz])^(1-0.097)) - i*(0.13[S/m])/2*pi*freq*e_0  // Complex permittivity of skin (wet)
  ep_muscle = 3.91+ 55/(1+(i*freq/18[GHz])^(1-0.165)) + 663/(1+(i*freq/0.78[MHz])^(1-0.387)) - i*(0.633[S/m])/2*pi*freq*e_0  // Complex permittivity of muscle
  ep_lung_inflated = 4.44+ 14.6/(1+(i*freq/16.1[GHz])^(1-0.001)) + 646/(1+(i*freq/3.22[MHz])^(1-0.181)) - i*(0.0842[S/m])/2*pi*freq*e_0  // Complex permittivity of the inflated lung
  ep_kidney = 4.43 + 43.3/(1+(i*freq/20.2[GHz])^(1-0.052)) + 2050/(1+(i*freq/2.87[MHz])^(1-0.212)) - i*(0.267[S/m])/2*pi*freq*e_0  // Complex permittivity of the kidney
  ep_heart = 3.84 + 49.1/(1+(i*freq/18.7[GHz])^(1-0.049)) + 2520/(1+(i*freq/1.73[MHz])^(1-0.196)) - i*(0.31[S/m])/2*pi*freq*e_0  // Complex permittivity of heart
  ep_bone_cort = 3.22 + 10/(1+(i*freq/9.49[GHz])^(1-0.218)) + 693/(1+(i*freq/0.414[MHz])^(1-0.217)) - i*(0.018[S/m])/2*pi*freq*e_0  // Complex permittivity of cortical bone
  ep_bone_can = 4.21 + 12.1/(1+(i*freq/15.6[GHz])^(1-0.003)) + 917/(1+(i*freq/0.471[MHz])^(1-0.33)) - i*(0.0231[S/m])/2*pi*freq*e_0  // Complex permittivity of cancellous bone
  ep_fat = 2.32 + 2.14/(1+(i*freq/20.1[GHz])^(1-0.002)) + 19.7/(1+(i*freq/8.25[MHz])^(1-0.259)) - i*(0.0222[S/m])/2*pi*freq*e_0  // Complex permittivity of fat
  ep_aorta = 2.27 + 28.2/(1+(i*freq/15.2[GHz])^(1-0.001)) + 1360/(1+(i*freq/0.0225[MHz])^(1-0.59)) - i*(0.292[S/m])/2*pi*freq*e_0  // Complex permittivity of aorta
  e_0 = 8.85E-12 [F/m]  // Permittivity of a vacuum
  t_kidney = 4 [cm]  // Average thickness of the kidney
  t_muscle = 2.87 [cm]  // Average thickness of the posterior trunk muscles.
  t_fat = 4 [mm]  // Average thickness of the fat at the back
  t_skin = 116 [um]  // Average thickness of the skin at the back (male)
  L_back = t_kidney + t_vena/4  // Length of back area
  W_model = W_kidney + (L_renal-excess) + t_vena  // Width of back area
  L_electrode = 5[mm]  // Length of electrode
  W_back_electrode = 2.5 [cm]  // Width of electrode
  t_electrode = L_electrode/4  // Thickness of electrode
  t_model = (2*t_vena + t_spine + t_fat + t_skin)  // Thickness of entire model
  er_lung_inflated = real(ep_lung_inflated)  // Relative permittivity of lung tissue (inflated)
  cond_lung_inflated = e_0*imag(ep_lung_inflated)*2*pi*freq [S/m]  // Conductivity of lung tissue (inflated)
  er_bone_can = real(ep_bone_can)  // Relative permittivity of cancellous bone
  cond_bone_can = e_0*imag(ep_bone_can)*2*pi*freq [S/m]  // Conductivity of cancellous bone
  er_muscle = real(ep_muscle)  // Relative permittivity of muscle
  cond_muscle = e_0*imag(ep_muscle)*2*pi*freq [S/m]  // Conductivity of muscle
  er_fat = real(ep_fat)  // Relative permittivity of fat
  cond_fat = e_0*imag(ep_fat)*2*pi*freq [S/m]  // Conductivity of fat
  er_skin_wet = real(ep_skin_wet)  // Relative permittivity of wet skin
  cond_skin_wet = e_0*imag(ep_skin_wet)*2*pi*freq [S/m]  // Conductivity of wet skin
  er_skin_dry = real(ep_skin_dry)  // Relative permittivity of dry skin
  cond_skin_dry = e_0*imag(ep_skin_dry)*2*pi*freq [S/m]  // Conductivity of dry skin
  z_electrode = 2 [mm]  // Spacing between electrodes
  er_kidney = real(ep_kidney)  // Relative permittivity of the kidney tissue
  cond_kidney = e_0*imag(ep_kidney)*2*pi*freq [S/m]  // Conductivity of the kidney tissue
  L_kidney = 11 [cm]  // Length of the Kidney
  t_rib = 6 [mm]  // Thickness of rib 12
  t_rib_cancellous = 0.9 [mm]  // Thickness of cancellous bone
  W_rib = 11.3 [mm]  // Width of rib 12
  W_kidney = 6 [cm]  // Width of the human kidney
  L_mid = 1 [cm]  // Length of the middle of kidney
  L_c1 = (L_kidney - L_mid)/4  // Radius of 2 circles to make kidney
  L_c2 = W_kidney - L_c1/2  // Radius of arc to build kidney
  ep_blood = 11.8 + 41.4/(1+(i*freq/15.8[GHz])^(1-0.015)) + 7930/(1+(i*freq/0.947[MHz])^(1-0.092)) - i*(0.996[S/m])/2*pi*freq*e_0  // Complex permittivity of blood
  er_blood = real(ep_blood)  // Relative permittivity of blood
  cond_blood = abs(e_0*imag(ep_blood)*2*pi*freq) [S/m]  // Conductivity of the human blood
  cond_bone_cort = abs(e_0*imag(ep_bone_cort)*2*pi*freq) [S/m]  // Conductivity of cortical bone
  er_bone_cort = real(ep_bone_cort)  // Relative permittivity of cortical bone
  t_renal = 8.9 [mm]  // Average diameter of the renal vein
  L_renal = 6 [cm]  // Length of the renal vein
  t_vein_wall = 0.5 [mm]  // Thickness of the renal vein walls
  t_artery_wall = 1 [mm]  // Thickness of the renal artery wall
  t_vena = 2.1 [cm]  // Diameter of the vena cava
  t_vena_wall = 1.5 [mm]  // Thickness of the vena cava wall
  t_abdominal_wall = 2 [mm]  // Thickness of the abdominal aorta wall
  t_spine = 3.6 [cm]  // Thickness of a spine
  L_spine = 5.31 [cm]  // Length of the human spine
  excess = L_c1 - L_c1*cos(45*(pi/180))  // Excess distance between lobe of kidney and middle
  W_total = (W_model - t_vena/2) + L_spine/2
  ang_renal_electrode = (W_renal_electrode/(t_renal/2))*(180/pi)  // Sector angle used to create renal vien electrodes
  W_renal_electrode = 1 [cm]  // Width of the renal vein electrodes
  correction_x = -0.014161165235168152  // Correction distance from origin
  cond_aorta = e_0*imag(ep_aorta)*2*pi*freq [S/m]
  er_aorta = real(ep_aorta)
  W_sample = 19 [cm]  // Width of channel model (for scaling)

Geometry
  geom1 "Geometry 1" (3D, length unit m)
    wp4: WorkPlane | quickplane = yz; quickx = -t_kidney/2; unite = on
      c1: Circle | pos = {-L_c1, L_c1 + L_mid/2}; r = L_c1
      c2: Circle | pos = {-L_c1, -(L_c1 + L_mid/2)}; r = L_c1
      pt1: Point (disabled) | p = {-W_kidney, }
      ic1: InterpolationCurve
        table = 
          {-L_c1, L_kidney/2}
          {- (L_c1 + L_c1*cos(pi/4)), L_kidney/2 - (L_c1 - L_c1*sin(pi/4))}
          {-W_kidney, 0}
          {- (L_c1 + L_c1*cos(pi/4)), -(L_kidney/2 - (L_c1 - L_c1*sin(pi/4)))}
          {-L_c1, -L_kidney/2}
        starttang = {-0.155664146519, -0.0197926953722}
        endtang = {0.155664146519, -0.0197926953722}
      ls1: LineSegment
        specify1 = coord
        coord1 = {-(L_c1-L_c1*cos(pi/4)), L_kidney/2 - (L_c1 + L_c1*sin(pi/4))}
        specify2 = coord
        coord2 = {-(L_c1-L_c1*cos(pi/4)), -(L_kidney/2 - (L_c1 + L_c1*sin(pi/4)))}
      ic2: InterpolationCurve (disabled)
        table = 
          {-(L_c1-L_c1*cos(pi/4)), L_kidney/2 - (L_c1 + L_c1*sin(pi/4))}
          {-0.01, 0}
          {-(L_c1-L_c1*cos(pi/4)), -(L_kidney/2 - (L_c1 + L_c1*sin(pi/4)))}
        starttang = {-0.0107106781187, -0.0246446609407}
        endtang = {0.0107106781187, -0.0246446609407}
      r1: Rectangle | pos = {-W_kidney/2, 0}; base = center; size = {W_kidney, L_kidney}
      csol1: ConvertToSolid | input = c1, c2, ic1, ls1
      dif1: Difference | input = r1; input2 = csol1
      r2: Rectangle | pos = {-W_kidney/2, 0}; base = center; size = {W_kidney, L_kidney}
      dif2: Difference | input = r2; input2 = dif1
    ext4: Extrude "Kidney" | workplane = wp4; input = wp4; distance = t_kidney
    wp6: WorkPlane "Renal Vein and Artery"
      planetype = faceparallel
      quickplane = xz
      face = ext4(1) boundaries 8
      unite = on
      c1: Circle "Renal Vein" | pos = {0, -t_kidney/4}; r = t_renal/2
      c2: Circle "Renal Artery" | pos = {0, t_kidney/4}; r = t_renal/2
      c3: Circle "Inner Vein" | pos = {0, -t_kidney/4}; r = t_renal/2 - t_vein_wall
      c4: Circle "Inner Artery" | pos = {0, t_kidney/4}; r = t_renal/2 - t_artery_wall
      dif1: Difference | input = c1; input2 = c3; keepsubtract = on
      dif2: Difference | input = c2; input2 = c3, c4; keepsubtract = on
    ext5: Extrude | workplane = wp6; input = wp6; distance = L_renal + t_vena/2
    wp7: WorkPlane "Vena Cava and Abdominal Artery" | quickz = -L_kidney/2; unite = on
      c1: Circle "Vena Cava" | pos = {t_vena/2, (L_renal -(L_c1-L_c1*cos(pi/4))) + (t_vena/2)}; r = t_vena/2
      c2: Circle "Abdominal Aorta" | pos = {-t_vena/2, (L_renal -(L_c1-L_c1*cos(pi/4))) + (t_vena/2)}; r = t_vena/2
      c3: Circle "Inner Vena Cava"
        pos = {t_vena/2, (L_renal -(L_c1-L_c1*cos(pi/4))) + (t_vena/2)}
        r = t_vena/2 - t_vena_wall
      c4: Circle "Inner Abdominal Aorta"
        pos = {-t_vena/2, (L_renal -(L_c1-L_c1*cos(pi/4))) + (t_vena/2)}
        r = t_vena/2 - t_abdominal_wall
      dif1: Difference | input = c2; input2 = c4; keepsubtract = on
      dif2: Difference | input = c1; input2 = c3; keepsubtract = on
    ext6: Extrude | workplane = wp7; input = wp7; distance = L_kidney
    uni1: Union | input = ext4, ext5, ext6
    mov1: Move | input = uni1; displx = 0; disply = - (W_model/2 - W_kidney); displz = 0
    wp8: WorkPlane "Spine" | quickplane = yz; quickx = -t_vena; edge = mov1(1) edges 218; unite = on
      r1: Rectangle "Spine" | pos = {W_model/2 - t_vena/2, 0}; base = center; size = {L_spine, L_kidney}
    ext7: Extrude | workplane = wp8; input = wp8; distance = t_spine; reverse = on
    wp9: WorkPlane "Rib and Trunk Muscles"
      planetype = faceparallel
      quickplane = zx
      face = ext7(1) boundaries 2
      unite = on
      r1: Rectangle "Rib 12" | pos = {L_kidney/2 - W_rib/2, -(t_spine/2 - t_rib/2)}; base = center; size = {W_rib, t_rib}
      r2: Rectangle "Rib 12 Cortical"
        pos = {L_kidney/2 - W_rib/2, -(t_spine/2 - t_rib/2)}
        base = center
        size = {W_rib - t_rib_cancellous, t_rib - t_rib_cancellous}
      dif1: Difference | input = r1; input2 = r2; keepsubtract = on
      r3: Rectangle "Connective Muscle" | base = center; size = {L_kidney, t_spine}
      dif2: Difference | input = r3; input2 = dif1, r2; keepsubtract = on
    ext8: Extrude | workplane = wp9; input = wp9; distance = W_model- t_vena/2 - L_spine/2
    wp10: WorkPlane "Fat Layer" | planetype = faceparallel; quickplane = zx; face = ext7(1) boundaries 1; unite = on
      r1: Rectangle "Fat" | pos = {-(W_model - t_vena/2), -L_kidney/2}; size = {W_total, L_kidney}
    ext9: Extrude | workplane = wp10; input = wp10; distance = t_fat
    wp11: WorkPlane "Skin Layer" | planetype = faceparallel; face = ext9(1) boundaries 1; unite = on
      r1: Rectangle "Skin" | base = center; size = {W_total, L_kidney}
    ext10: Extrude | workplane = wp11; input = wp11; distance = t_skin
    wp2: WorkPlane "Renal Signal Electrode" | quickplane = zx; unite = on
      ca1: CircularArc
        center = {0, t_kidney/4}
        r = t_renal/2
        point1 = {0.0040123919813, 0.00807562722209}
        point2 = {-0.0040123919813, 0.00807562722209}
        angle1 = -90 + (ang_renal_electrode/2)
        angle2 = -90 - (ang_renal_electrode/2)
        clockwise = on
    ext11: Extrude | workplane = wp2; input = wp2; distance = W_renal_electrode
    wp12: WorkPlane "Renal Ground Electrode" | quickplane = zx; quicky = W_renal_electrode + z_electrode; unite = on
      ca1: CircularArc
        center = {0, t_kidney/4}
        r = t_renal/2
        point1 = {0.0040123919813, 0.00807562722209}
        point2 = {-0.0040123919813, 0.00807562722209}
        angle1 = -90 + (ang_renal_electrode/2)
        angle2 = -90 - (ang_renal_electrode/2)
        clockwise = on
    ext12: Extrude | workplane = wp12; input = wp12; distance = W_renal_electrode
    wp5: WorkPlane "Back Electrodes" | quickplane = yz; quickx = -(t_vena + t_spine + t_fat + t_skin); unite = on
      sq1: Square "Signal Electrode" | base = center; size = W_back_electrode
      sq2: Square "Signal Electrode 2" | pos = {W_back_electrode + z_electrode, 0}; base = center; size = W_back_electrode
    blk1: Block "Blood Block" (disabled)
      pos = {-t_model + (t_model - t_vena), 0, 0}
      base = center
      size = {1.2*t_model, W_model + t_spine, L_kidney}
    blk2: Block "Blood Block 1" | base = center; size = {2*t_vena, W_model + (L_spine/2 - t_vena/2), L_kidney}
    mov2: Move | input = blk2; displx = 0; disply = (L_spine/2 - t_vena/2)/2; displz = 0
    uni2: Union | input = ext10, ext7, ext8, ext9, mov2
    sca1: Scale
      input = uni2
      type = anisotropic
      anisotropic = {1, W_sample/(W_model + (L_spine/2 - t_vena/2)), 1}
      factor = {1, W_sample/(W_model + (L_spine/2 - t_vena/2)), 1}
    fin: Finalize "Form Union"

Materials
  mat1: Common "Kidney Tissue" on domains 10
    def "Basic"
      electricconductivity = cond_kidney
      relpermittivity = er_kidney
  mat3: Common "Muscle" on domains 3
    def "Basic"
      electricconductivity = cond_muscle
      relpermittivity = er_muscle
  mat4: Common "Fat" on domains 2
    def "Basic"
      electricconductivity = cond_fat
      relpermittivity = er_fat
  mat5: Common "Skin" on domains 1
    def "Basic"
      electricconductivity = cond_skin_wet
      relpermittivity = er_skin_wet
  mat6: Common "Blood" on domains 7, 8, 11, 15-17, 19, 23-25
    def "Basic"
      electricconductivity = cond_blood
      relpermittivity = er_blood
  mat7: Common "Bone Cancellous" on domains 4, 6
    def "Basic"
      relpermittivity = er_bone_can
      electricconductivity = cond_bone_can
  mat8: Common "Bone Cortical" on domains 5
    def "Basic"
      relpermittivity = er_bone_cort
      electricconductivity = cond_bone_cort
  mat9: Common "Blood Vessel" on domains 9, 12-14, 18, 20-22
    def "Basic"
      electricconductivity = cond_aorta
      relpermittivity = er_aorta

Physics
  ec: ConductiveMedia "Electric Currents" on all domains
    dependent variable V
    cucn1: CurrentConservation (default)
    ein1: ElectricInsulation (default)
    init1: init "Initial Values 1" (default)
    bcs1: BoundaryCurrentSource (disabled) on no boundaries | Qjs = 1
    gnd1: Ground on boundaries 114, 115
    term1: Terminal on boundaries 112, 113 | I0 = 0.0008
    term2: Terminal on boundaries 5 | TerminalType = Circuit
    term3: Terminal on boundaries 6 | TerminalType = Circuit
  cir: Circuit "Electrical Circuit"
    dependent variable voltages
    gnd1: GroundNode
    R1: Resistor | Connections = {2, 3}
    IvsU1: ModelDeviceIV "External I vs. U 1" | V_src = root.comp1.ec.V0_2; Connections = {2, 0}
    IvsU2: ModelDeviceIV "External I vs. U 2" | V_src = root.comp1.ec.V0_3; Connections = {3, 0}

Mesh
  mesh1 "Mesh 1"
    size: MeshSizeDefault | hauto = 6
    ftet2: FreeTet "Free Tetrahedral 2" on domains 7
      size1: Size on boundaries 109, 110, 112-115
    ftet1: FreeTet "Free Tetrahedral 1" on remaining entities | optcurved = on

Studies
  std1 "Study 1"
    param2: Parametric "Parametric Sweep 2" (disabled)
      pname = W_back_electrode
      plistarr = range(1 [cm],0.5 [cm],2.5 [cm])
      punit = m
    param: Parametric "Parametric Sweep" (disabled)
      pname = W_renal_electrode
      plistarr = range(0.5 [cm],0.25 [cm],1 [cm])
      punit = m
    freq: Frequency "Frequency Domain" | plist = range(1 [MHz],0.5 [MHz],80 [MHz])

Solver configurations
  sol1 "Solution 1" (study std1)
    v1: Variables "Dependent Variables 1"
    s1: Stationary "Stationary Solver 1" | linpmethod = sol
      p1: Parametric | pname = freq; plistarr = range(1 [MHz],0.5 [MHz],80 [MHz]); punit = Hz; pcontinuationmode = no
      fc1: FullyCoupled | linsolver = dDef
      dDef: Direct

Datasets
  dset1: Solution | solution = sol1

Derived values
  gev1: EvalGlobal "Channel Response"
    data = dset1
    table = tbl1
    expr = (ec.V0_2 - ec.V0_3)/ec.V0_1
    unit = 1
    descr = Channel Response

Tables
  mrkvl1: Table "Intersections"
    // Graph marker
    freq (MHz) | Voltage Gain/ dB
    18.375 | -49.9754
    23.625 | -49.3966
  mrkvl2: Table "Intersections 1"
    // Graph marker
    freq (MHz) | Power Gain/ dB
    18.375 | -62.6348
    23.625 | -62.257
  mrkvl3: Table "Intersections 2"
    // Graph marker
    freq (MHz) | Transimpedance (Ω)
    18.375 | 0.171904
    23.625 | 0.175441
  mrkvl4: Table "Intersections 3"
    // Graph marker
    freq (MHz) | Phase (1)
    18.375 | -26.2459
    23.625 | -27.2391
  tbl1: Table
    // Channel Response
    freq (Hz) | Channel Response (1)
    1e+06 | 0.00119739+3.97441e-05i
    1.5e+06 | 0.00130002-0.000116093i
    2e+06 | 0.00139311-0.000230047i
    2.5e+06 | 0.00148192-0.000322474i
    3e+06 | 0.00156687-0.000401475i
    3.5e+06 | 0.00164787-0.000471137i
    4e+06 | 0.00172486-0.000533841i
    4.5e+06 | 0.00179786-0.000591107i
    5e+06 | 0.00186699-0.000643968i
    5.5e+06 | 0.00193237-0.000693155i
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
Plots
  pg1: PlotGroup3D "Electric Potential (ec)" | data = dset1
    vol1: Volume (disabled) | expr = V
    slc1: Slice
      expr = ec.normE
      descr = Electric field norm
      title = Electric Field Density (V/m) across the Kidney to Back Model
      quickplane = xy
      quickznumber = 1
      quickxnumber = 1
  pg2: PlotGroup3D "Electric Field Norm (ec)" | data = dset1
    mslc1: Multislice
      expr = ec.normE
      multiplanexmethod = coord
      xcoord = ec.CPx
      multiplaneymethod = coord
      ycoord = ec.CPy
      multiplanezmethod = coord
      zcoord = ec.CPz
    strmsl1: StreamlineMultislice
      expr = {ec.Ex, ec.Ey, ec.Ez}
      multiplanexmethod = coord
      xcoord = ec.CPx
      multiplaneymethod = coord
      ycoord = ec.CPy
      multiplanezmethod = coord
      zcoord = ec.CPz
      udist = 0.02
      col1: Color "Color Expression 1" | expr = ec.normE
      filt1: Filter | expr = !isScalingSystemDomain
  pg4: PlotGroup1D "Voltage Gain against Frequency" | data = dset1
    glob1: Global "Voltage Gain"
      data = dset1
      expr = 20*log10(abs((ec.V0_2 - ec.V0_3)/ec.V0_1))
      descr = Voltage Gain/ dB
      title = Voltage Gain against Frequency
      gmrk1: GraphMarker
        displaymode = intersection
        intersectionx = range(18.375,5.25,23.625)
        includexcoord = on
        pointradius = 5
        anchorpoint = lowerright
        table = mrkvl1
  pg5: PlotGroup1D "Power Gain against Frequency" | data = dset1; touchpostshow = on
    glob1: Global "Power Gain"
      data = dset1
      expr = 10*log10(abs((((ec.V0_2 - ec.V0_3)^2)/1000)/(ec.I0_1*ec.V0_1)))
      descr = Power Gain/ dB
      title = Power Gain against Frequency
      gmrk1: GraphMarker
        displaymode = intersection
        intersectionx = range(18.375,5.25,23.625)
        includexcoord = on
        pointradius = 5
        anchorpoint = lowerright
        table = mrkvl2
  pg6: PlotGroup1D "Transimpedance against Frequency" | data = dset1
    glob1: Global "Transimpedance"
      data = dset1
      expr = abs((ec.V0_2 - ec.V0_3)/ec.I0_1)
      unit = Ω
      descr = Transimpedance
      title = Transimpedance against Frequency
      gmrk1: GraphMarker
        displaymode = intersection
        intersectionx = range(18.375,5.25,23.625)
        includexcoord = on
        pointradius = 5
        anchorpoint = lowerright
        table = mrkvl3
  pg11: PlotGroup1D "Phase against Frequency" | data = dset1; title = Phase Response; ylabel = Phase/ deg
    glob1: Global "Phase"
      data = dset1
      expr = (arg((ec.V0_2 - ec.V0_3)/ec.V0_1))*(180/pi)
      unit = 1
      descr = Phase
      title = Power Gain against Frequency
      gmrk1: GraphMarker
        displaymode = intersection
        intersectionx = range(18.375,5.25,23.625)
        includexcoord = on
        pointradius = 5
        anchorpoint = lowerleft
        table = mrkvl4
  pg3: PlotGroup3D "Electric Field Norm (ec) 1"
    data = dset1
    title = Current Density (dB) across the Kidney to Back Model
    mslc1: Multislice
      data = dset1
      expr = 10*log10(ec.normJ)
      descr = Electric Field
      title = Electric Field Density (dB) across the Aorta to Chest Model
      xnumber = 0
      xcoord = 0
      ycoord = (W_back_electrode/2 + z_electrode/2)
      zcoord = 0